# read
read tie.frd
read tie.inp nom
# view
view disp
view elem
rot y
rot l 10
rot u 5
# color plot of worst ps
ds -1 e 23
plot fv all
plus e Eind n
plus e all n
hcpy png
sys mv hcpy_1.png Refs/worstPS.png
# shaded deformed plot
plus e all n
hcpy png
sys mv hcpy_2.png Refs/def.png
