read II.frd new
rot -x
rot c -90
plot f all n
zoom 1.1
hcpy png
sys mv hcpy_1.png Refs/undefx.png

rot l 5
rot u 5
frame
zoom 1.1
plot f all n
hcpy png
sys mv hcpy_2.png Refs/undef.png

view disp
scal d 100
plot f all n
hcpy png
sys mv hcpy_3.png Refs/def.png

view elem
ds 2 e 1
plot fv all
hcpy png
sys mv hcpy_4.png Refs/Sxx.png

ds 2 e 6
rot u -5
view elem off
plot fv all
mm 8
hcpy png
sys mv hcpy_5.png Refs/Sxz.png
