read Tjoint.frd new

ds -0 e 7
view disp
view elem
scal d 20

seta base all
copy all new mir x
copy all new mir z
comp new do

frame
rot -z
zoom 4
rot r 6
rot u 6
tra u 20

plot f new n
plus fv base

hcpy png
sys mv hcpy_1.png SE_expanded.png
